// COMSOL Multiphysics 6.4.0.293 model "NoNew_PlacasMueve.mph"
// Outline of the model tree

Parameters
  L = 0.1[m]  // Largo del Plano
  H = 0.01[m]  // Distancia entre Planos
  vel_ini = 0.0[m/s]  // Velocidad del Fluido al Inicio
  rho = 1000[kg/m^3]  // Densidad del fluido
  mu = 1e-3[Pa*s]  // Viscosidad del Fluido
  P0 = 0[Pa]
  dpdx = - (P0/ L)
  vel_top = 0.2[m/s]
  n = 1
  K = mu[s^(n-1)]
  C = (mu*vel_top)/H - 0.5*dpdx*H

Variables
  var3 "Variables 3" on all domains
    u_ana = -(dpdx/(2*mu))*y*(H-y)
    comp1.u_ana2 = 1[m/s]

Selections
  sel1: Explicit on no boundaries

Geometry
  geom1 "Geometría 1" (2D, length unit m)
    r2: Rectangle "Rectángulo 2" | size = {L, H}
    fin: Finalize "Formar unión"

Physics
  spf: LaminarFlow "Flujo laminar" on all domains
    dependent variable vel = {v_x, v_y, v_z}
    ShapeProperty.order_fluid = 2
    fp1: FluidProperties "Propiedades de fluidos 1" (default)
      rho_mat = userdef
      rho = rho
      Constitutiverelation = InelasticNonNewtonian
      mu_mat = userdef
      mu = mu
      m_pow_mat = userdef
      m_pow = K
      n_pow_mat = userdef
      n_pow = n
    init1: init "Valores iniciales 1" (default) | u_init = {0, 0, 0}; p_init = P0
    wallbc1: WallBC "Pared Top" (default)
      BoundaryCondition = NoSlip
      utr = {0, 0, 0}
      uvw = vel_top
      SlidingWall = 1
      TranslationalVelocityOption = AutomaticFromFrame
    inl1: InletBoundary "Entrada 1" on boundaries 1 | BoundaryCondition = Pressure; U0in = vel_ini; p0 = P0
    out1: OutletBoundary "Salida 1" on boundaries 4
    wallbc2: WallBC "Pared Bottom" on boundaries 2

Mesh
  mesh1 "Malla 1" (physics-controlled)
    size: MeshSizeDefault "Tamaño" | table = cfd; hauto = 4

Studies
  std1 "Estudio 1"
    stat: Stationary "Estacionario"

Solver configurations
  sol1 "Solución 1" (study std1)
    v1: Variables "Variables dependientes 1"
    s1: Stationary "Resolvedor estacionario 1"
      fc1: FullyCoupled "Completamente acoplado 1"
      d1: Direct "Directo, variables de flujo de fluido (spf)"

Datasets
  dset1: Solution | solution = sol1
  cln1: CutLine2D "Linea de corte en 2D 1" | data = dset1; genpoints = {{L*0.8, 0}, {L*0.8, H}}

Plots
  pg1: PlotGroup2D "Velocidad (spf)" | data = dset1
    surf1: Surface "Superficie" | expr = spf.U
  pg2: PlotGroup2D "Presión (spf)" | data = dset1
    surf1: Surface "Superficie 1" | expr = p; bandcount = 25
  pg3: PlotGroup1D "Grupo gráfico 1D 3" | data = dset1
    lngr1: LineGraph "Gráfico lineal 1" | data = cln1; expr = v_x; xdata = expr; xdataexpr = y
    lngr2: LineGraph "Gráfico lineal 2" | data = cln1; expr = v_ini/H*y; xdata = expr; xdataexpr = y